**
**
**
** file created by  A N S A  Tue Apr 16 19:07:02 2013
**
** output from :
**
** /net/linux273/fs1/can/tpm_can_rtm/tpm_aniso_csr/Untitled
**
**
** ABAQUS names' user prefix library
**
** AMPLITUDE = XY
** BEAM_SECTION = P
** COHESIVE_SECTION = P
** CONNECTOR_DERIVED_COMPONENT = D
** CONNECTOR_DERIVED_COMPONENT(MatDB) = D
** CONNECTOR_SECTION = P
** CONTACT_CLEARANCE = CL
** CONTACT_PAIR = G
** CONTINUUM_SHELL_SECTION = P
** COUPLING = G
** CUTTING_SURFACE = G
** DASHPOT_PROP = A
** FASTENER_PROPERTY = A
** FILTER = F
** GAP_PROP = A
** GASKET_SECTION = P
** INTERACTION_OUTPUT = I
** JOINT_PROP = A
** MATERIAL =
** ORIENTATION_C = OR
** ORIENTATION_NODES_C = OR
** ORIENTATION_NODES_DYN = OR
** ORIENTATION_NODES_R = OR
** ORIENTATION_NODES_S = OR
** ORIENTATION_OFFSET_TO_NODES = OR
** ORIENTATION_R = OR
** ORIENTATION_S = OR
** SECTION_CONTROL = A
** SET = S
** SHELL_SECTION = P
** SOLID_SECTION = P
** SPRING_PROP = A
** SURFACE = G
** SURFACE_INTERACTION = A
** SURFACE_SECTION = P
** TRUSS_PROP = A
**
*HEADING

**
**
**
*NODE
       1,                  103.831,                 -45.6217,                  33.6931
       2,                  98.8054,                 -45.1731,                  32.0602
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**
** MEMBRANE and STRUCTURAL ELEMENTS
**
*ELEMENT, TYPE=S4, ELSET=x1
       1,        1,        2,        3,        4
      17,       65,       66,        2,        1
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*ELEMENT, TYPE=S4, ELSET=x2
       2,        5,        6,        7,        8
      18,       69,       70,        6,        5
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*ELEMENT, TYPE=S4, ELSET=x3
       3,        9,       10,       11,       12
      19,       73,       74,       10,        9
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*ELEMENT, TYPE=S4, ELSET=x4
       4,       13,       14,       15,       16
      20,       77,       78,       14,       13
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*ELEMENT, TYPE=S4, ELSET=x5
       5,       17,       18,       19,       20
      21,       81,       82,       18,       17
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*ELEMENT, TYPE=S4, ELSET=x6
       6,       21,       22,       23,       24
      22,       85,       86,       22,       21
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*ELEMENT, TYPE=S4, ELSET=x7
       7,       25,       26,       27,       28
      23,       89,       90,       26,       25
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*ELEMENT, TYPE=S4, ELSET=x8
       8,       29,       30,       31,       32
      24,       93,       94,       30,       29
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*ELEMENT, TYPE=S4, ELSET=x9
       9,       33,       34,       35,       36
      25,       97,       98,       34,       33
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*ELEMENT, TYPE=S4, ELSET=x10
      10,       37,       38,       39,       40
      26,      101,      102,       38,       37
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*ELEMENT, TYPE=S4, ELSET=x11
      11,       41,       42,       43,       44
      27,      105,      106,       42,       41
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*ELEMENT, TYPE=S4, ELSET=x12
      12,       45,       46,       47,       48
      28,      109,      110,       46,       45
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*ELEMENT, TYPE=S4, ELSET=x13
      13,       49,       50,       51,       52
      29,      113,      114,       50,       49
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*ELEMENT, TYPE=S4, ELSET=x14
      14,       53,       54,       55,       56
      30,      117,      118,       54,       53
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*ELEMENT, TYPE=S4, ELSET=x15
      15,       57,       58,       59,       60
      31,      121,      122,       58,       57
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*ELEMENT, TYPE=S4, ELSET=x16
      16,       61,       62,       63,       64
      32,      125,      126,       62,       61
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**
**
**
**
**
**
**
** SECTION DATA
**
*SHELL SECTION, ELSET=x1, MATERIAL=Default MATERIAL
                      1.,
*SHELL SECTION, ELSET=x2, MATERIAL=Default MATERIAL
                      1.,
*SHELL SECTION, ELSET=x3, MATERIAL=Default MATERIAL
                      1.,
*SHELL SECTION, ELSET=x4, MATERIAL=Default MATERIAL
                      1.,
*SHELL SECTION, ELSET=x5, MATERIAL=Default MATERIAL
                      1.,
*SHELL SECTION, ELSET=x6, MATERIAL=Default MATERIAL
                      1.,
*SHELL SECTION, ELSET=x7, MATERIAL=Default MATERIAL
                      1.,
*SHELL SECTION, ELSET=x8, MATERIAL=Default MATERIAL
                      1.,
*SHELL SECTION, ELSET=x9, MATERIAL=Default MATERIAL
                      1.,
*SHELL SECTION, ELSET=x10, MATERIAL=Default MATERIAL
                      1.,
*SHELL SECTION, ELSET=x11, MATERIAL=Default MATERIAL
                      1.,
*SHELL SECTION, ELSET=x12, MATERIAL=Default MATERIAL
                      1.,
*SHELL SECTION, ELSET=x13, MATERIAL=Default MATERIAL
                      1.,
*SHELL SECTION, ELSET=x14, MATERIAL=Default MATERIAL
                      1.,
*SHELL SECTION, ELSET=x15, MATERIAL=Default MATERIAL
                      1.,
*SHELL SECTION, ELSET=x16, MATERIAL=Default MATERIAL
                      1.,
**
** MATERIALS
**
**
**Default MATERIAL
**
*MATERIAL, NAME=Default MATERIAL
*DENSITY
                 7.85E-9,
*ELASTIC, TYPE=ISOTROPIC
                 210000.,                      0.3
**
**
**
