**
**
**
** file created by  A N S A  Thu May  2 18:33:20 2013
**
** output from :
**
** /net/linux273/fs1/can/tpm_can_rtm/tpm_aniso_csr/Untitled
**
**
** ABAQUS names' user prefix library
**
** AMPLITUDE = XY
** BEAM_SECTION = P
** COHESIVE_SECTION = P
** CONNECTOR_DERIVED_COMPONENT = D
** CONNECTOR_DERIVED_COMPONENT(MatDB) = D
** CONNECTOR_SECTION = P
** CONTACT_CLEARANCE = CL
** CONTACT_PAIR = G
** CONTINUUM_SHELL_SECTION = P
** COUPLING = G
** CUTTING_SURFACE = G
** DASHPOT_PROP = A
** FASTENER_PROPERTY = A
** FILTER = F
** GAP_PROP = A
** GASKET_SECTION = P
** INTERACTION_OUTPUT = I
** JOINT_PROP = A
** MATERIAL =
** ORIENTATION_C = OR
** ORIENTATION_NODES_C = OR
** ORIENTATION_NODES_DYN = OR
** ORIENTATION_NODES_R = OR
** ORIENTATION_NODES_S = OR
** ORIENTATION_OFFSET_TO_NODES = OR
** ORIENTATION_R = OR
** ORIENTATION_S = OR
** SECTION_CONTROL = A
** SET = S
** SHELL_SECTION = P
** SOLID_SECTION = P
** SPRING_PROP = A
** SURFACE = G
** SURFACE_INTERACTION = A
** SURFACE_SECTION = P
** TRUSS_PROP = A
**
*HEADING

**
**
**
*NODE
     209,                       0.,        9.719145357969625,       -48.38747211650294
     210,                       0.,        9.999999999999986,      -49.999999999999886
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**
** SOLID ELEMENTS
**
*ELEMENT, TYPE=C3D8, ELSET=SOLID_SECTION
      94,      708,      710,      316,      318,      709,      711,      315,      317
      95,      580,      582,      710,      708,      581,      583,      711,      709
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**
**
**
**
**
**
**
** SECTION DATA
**
** MATERIALS
**
**
**Default MATERIAL
**
*MATERIAL, NAME=Default MATERIAL
*DENSITY
                 7.85E-9,
*ELASTIC, TYPE=ISOTROPIC
                 210000.,                      0.3
**
**
**
**
** SURFACE DEFINITIONS
**
*SURFACE, NAME=slave_contact, TYPE=ELEMENT
     124, S2
     125, S2
     126, S2
     127, S2
     128, S2
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    2793, S2
**
** SETS
**
*SOLID SECTION, ELSET=P2;my_solids, MATERIAL=Default MATERIAL
0.15, 3, somemat, 0
0.15, 3, somemat, 45
0.15, 3, somemat, -45
0.15, 3, somemat, 90
**
