**
**
**
** file created by  A N S A  Thu May 16 16:11:06 2013
**
** output from :
**
** /net/linux273/fs1/can/tpm_can_rtm/tpm_aniso_csr_con/Untitled
**
**
** ABAQUS names' user prefix library
**
** AMPLITUDE = XY
** BEAM_SECTION = P
** COHESIVE_SECTION = P
** CONNECTOR_DERIVED_COMPONENT = D
** CONNECTOR_DERIVED_COMPONENT(MatDB) = D
** CONNECTOR_SECTION = P
** CONTACT_CLEARANCE = CL
** CONTACT_PAIR = G
** CONTINUUM_SHELL_SECTION = P
** COUPLING = G
** CUTTING_SURFACE = G
** DASHPOT_PROP = A
** FASTENER_PROPERTY = A
** FILTER = F
** GAP_PROP = A
** GASKET_SECTION = P
** INTERACTION_OUTPUT = I
** JOINT_PROP = A
** MATERIAL =
** ORIENTATION_C = OR
** ORIENTATION_NODES_C = OR
** ORIENTATION_NODES_DYN = OR
** ORIENTATION_NODES_R = OR
** ORIENTATION_NODES_S = OR
** ORIENTATION_OFFSET_TO_NODES = OR
** ORIENTATION_R = OR
** ORIENTATION_S = OR
** SECTION_CONTROL = A
** SET = S
** SHELL_SECTION = P
** SOLID_SECTION = P
** SPRING_PROP = A
** SURFACE = G
** SURFACE_INTERACTION = A
** SURFACE_SECTION = P
** TRUSS_PROP = A
**
*HEADING

**
**
**
*NODE
    4762,             -3.944388005,              0.932316193,             -20.57590803
    4763,             -3.267546267,              4.775269838,             -23.41256831
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**
** SOLID ELEMENTS
**
*ELEMENT, TYPE=C3D8, ELSET=P2;tum_1
    4317,     6105,     5763,     5661,     5807,     6390,     6732,     6834,     6688
    4318,     6390,     6732,     6834,     6688,     7565,     7223,     7121,     7267
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**
**
**
**
**
**
**
** SECTION DATA
**
*SOLID SECTION, ELSET=P2;tum_1, MATERIAL=Default MATERIAL
**
** MATERIALS
**
**
**Default MATERIAL
**
*MATERIAL, NAME=Default MATERIAL
*DENSITY
                 7.85E-9,
*ELASTIC, TYPE=ISOTROPIC
                 210000.,                      0.3
**
**
**
**
** SETS
**
*NSET, NSET=S1;arter_input
    6994,     6995,     6997,     7003,     7005,     7007
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*NSET, NSET=S2;smallest
    6997,     7003,     7005,     7015,     7016,     7031
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*NSET, NSET=S3;mid
    6994,     6995,     7007,     7012,     7014,     7019
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